# [reference: Data Functions.xmcd]
# [reference: Fractalflocmodel.xmcd]
# [reference: FluidsFunctions.xmcd]
NTU := 100/68*mg/L
# [area: Import Data]
Location := 1  # 0 if lab, 1 if office
Root :=
    "C:\Users\whp28\" if Location == 0
    "C:\Users\William\" if Location == 1
Set1 := READPRN(concat(Root, "Google Drive\AGUACLARA DRIVE\AguaClara Grads\William Pennock\Spring 2017\Data\Aggregated Data\Set1.txt"))
SetQ := READPRN(concat(Root, "Google Drive\AGUACLARA DRIVE\AguaClara Grads\William Pennock\Spring 2017\Data\Aggregated Data\Questionable.txt"))
SetpH := READPRN(concat(Root, "Google Drive\AGUACLARA DRIVE\AguaClara Grads\William Pennock\Spring 2017\Data\Aggregated Data\SetpH.txt"))
SetVarε := READPRN(concat(Root, "Google Drive\AGUACLARA DRIVE\AguaClara Grads\William Pennock\Spring 2017\Data\Aggregated Data\VarEDR.txt"))
# [area: Arrays]
MetaID := 0
V_C := 11
pH := 1
θ_Exp := 12
HL_Floc := 2
Q_Tot := 13
AirTemp := 3
HL := 14
WatTemp := 4
ε_Avg := 15
ACTemp := 5
ν_Exp := 16
ACDepth := 6
Γ_Exp := 17
Eff := 7
ϕ_Exp := 18
Inf := 8
pC_star := 9
P_Visc := 19
Dose := 10
P_Inert := 20
Q_Varε := SetVarε[:, Q_Tot]*mL/s = [0.0001105; 7.914e-5; 0.0001348] m^3/s
pC_1 := Set1[:, pC_star]
P_Visc1 := Set1[:, P_Visc]
P_Inert1 := Set1[:, P_Inert]
pH_1 := Set1[:, pH]
ε_1 := Set1[:, ε_Avg]*mW/kg
Inf_1 := Set1[:, Inf]*NTU
ν_1 := Set1[:, ν_Exp]*mm^2/s
Γ_1 := Set1[:, Γ_Exp]
ϕ_1 := Set1[:, ϕ_Exp]
Dose_1 := Set1[:, Dose]*mg/L
θ_1 := Set1[:, θ_Exp]*s
pC_Q := SetQ[:, pC_star]
P_ViscQ := SetQ[:, P_Visc]
P_InertQ := SetQ[:, P_Inert]
pH_Q := SetQ[:, pH]
ε_Q := SetQ[:, ε_Avg]*mW/kg
Inf_Q := SetQ[:, Inf]*NTU
ν_Q := SetQ[:, ν_Exp]*mm^2/s
Γ_Q := SetQ[:, Γ_Exp]
ϕ_Q := SetQ[:, ϕ_Exp]
Dose_Q := SetQ[:, Dose]*mg/L
θ_Q := SetQ[:, θ_Exp]*s
pH_pH := SetpH[:, pH]
pC_pH := SetpH[:, pC_star]
P_InertpH := SetpH[:, P_Inert]
pH_arε := SetVarε[:, pH]
pC_Varε := SetVarε[:, pC_star]
# [area: Combined Graphs]
N_c := 0.1, 0.2 .. 1000
Γ_1 = [0.2649; 0.1394; 0.08361; 0.04691; 0.02657; 0.01424; 0.00505; 0.002584; 0.4246; 0.6367; 0.8373; 0.9617; 0.993]
Model_Visc(k, N_c) := 3/2*log(2/3*(6/π)^(2/3)*π*k*N_c + 1)
Model_Inert(k, N_c) := 9/8*log(8/9*(6/π)^(8/9)*π*k*N_c + 1)
k_ViscGuess := 0.02
k_InertGuess := 0.02
pC_Fit := submatrix(stack(pC_Q, pC_1), 0, 13, 0, 0)
P_ViscFit := submatrix(stack(P_ViscQ, P_Visc1), 0, 13, 0, 0)
P_InertFit := submatrix(stack(P_InertQ, P_Inert1), 0, 13, 0, 0)
k_ViscPy := 0.06433331
k_InertPy := 0.06970748
k_Visc := genfit(P_ViscFit, pC_Fit, k_ViscGuess, Model_Visc) = 0.0682173
k_Inert := genfit(P_ViscFit, pC_Fit, k_InertGuess, Model_Inert) = 0.103328
R2_ViscPy := corr(pC_Fit, vectorize(Model_Visc(k_ViscPy, P_ViscFit)))^2 = 0.97586
R2_InertPy := corr(pC_Fit, vectorize(Model_Inert(k_InertPy, P_InertFit)))^2 = 0.971278
R2_Visc := corr(pC_Fit, vectorize(Model_Visc(k_Visc, P_ViscFit)))^2 = 0.975759
R2_Inert := corr(pC_Fit, vectorize(Model_Inert(k_Inert, P_InertFit)))^2 = 0.967544
Sum2_ViscPy :=
    sum ← 0
    for i ∈ 0 .. last(P_ViscFit)
        diff2 ← (pC_Fit[i] - Model_Visc(k_ViscPy, stack(P_ViscFit)[i]))^2
        sum ← sum + diff2
    sum
    = 0.281236
Sum2_InertP :=
    sum ← 0
    for i ∈ 0 .. last(P_InertFit)
        diff2 ← (pC_Fit[i] - Model_Inert(k_InertPy, stack(P_InertFit)[i]))^2
        sum ← sum + diff2
    sum
    = 0.16956
Sum2_Visc :=
    sum ← 0
    for i ∈ 0 .. last(P_ViscFit)
        diff2 ← (pC_Fit[i] - Model_Visc(k_Visc, stack(P_ViscFit)[i]))^2
        sum ← sum + diff2
    sum
    = 0.269399
Sum2_Inert :=
    sum ← 0
    for i ∈ 0 .. last(P_InertFit)
        diff2 ← (pC_Fit[i] - Model_Inert(k_Inert, stack(P_InertFit)[i]))^2
        sum ← sum + diff2
    sum
    = 0.450743
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P_InertFit = [151; 84.3; 34.92; 14.77; 7.5; 159.1; 82.61; 49.25; 28.36; 15.61; 8.348; 3.028; 1.524; 284.3]
P_ViscFit = [107.9; 60.97; 24.84; 10.6; 5.449; 112.6; 58.43; 34.87; 20.38; 11.05; 5.909; 2.162; 1.081; 202.9]
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pH_1Plot := submatrix(pH_1, 8, 12, 0, 0)
pC_1Plot := submatrix(pC_1, 8, 12, 0, 0)
P_Inert1Plot := submatrix(P_Inert1, 8, 12, 0, 0)
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Param_Visc(Γ, θ, ε, ν, ϕ) := vectorize(Γ*θ*(ε/ν)^(1/2)*ϕ^(2/3))
Param_Inert(Γ, θ, ε, D_Clay, ϕ) := vectorize(Γ*θ*(ε/D_Clay^2)^(1/3)*ϕ^(8/9))
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max(ϕ_1)/min(ϕ_1) = 1.44006
Γ_CoagN(C_Clay, C_Al, EN_Chem, D_Tube, D_Clay, Π_HD, D_PACl) := 1 - exp(-ϕ_Floc.0(C_Al, 0*mg/L, EN_Chem)*D_Clay/(ϕ_Floc.0(0*mg/L, C_Clay, EN_Chem)*D_PACl)*1/π*Π_AClayATotal(C_Clay, D_Clay, D_Tube, Π_HD)/Π_ClaySphere(Π_HD))
Inf_All := stack(Inf_Q, Inf_1)
Dose_All := stack(Dose_Q, Dose_1)
Γ_7.20 :=
    for i ∈ 0 .. last(Inf_All)
        Γ[i] ← Γ_CoagN(Inf_All[i], Dose_All[i], 1, 1.25 in, 7 μm, Π_HD, 20 nm)
    Γ
Γ_2.100 :=
    for i ∈ 0 .. last(Inf_All)
        Γ[i] ← Γ_CoagN(Inf_All[i], Dose_All[i], 1, 1.25 in, 2 μm, Π_HD, 100 nm)
    Γ
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Doses := stack(Dose_Q, Dose_1)
Doses_Plot := 5*10^-5*kg/m^3, 1*10^-4*kg/m^3 .. 0.1*kg/m^3
θ_Mean := mean(stack(θ_Q, θ_1)) = 412.822 s
D_ClayPlot := 4 μm
ε_Mean := mean(stack(ε_Q, ε_1))
D_CoagPlot := 50 nm
Inf_Mean := mean(stack(Inf_Q, Inf_1))
ν_Mean := mean(stack(ν_Q, ν_1))
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min(Doses) = 5.117e-5 kg/m^3
max(Do)
# [area: Predictions]
number := 5
base := 10^(1/number*log(900/5)) = 2.82523
i := 0 .. number
Inf_Hyp[i] := 5*NTU*base^i
Inf_Hyp[0] = 0.00735294 kg/m^3
Γ_Hyp := 0.05
Dose_Hyp :=
    for i ∈ 0 .. number
        Dose[i] ← 0.1*mg/L
        while Γ_CoagN(Inf_Hyp[i], Dose[i], 1, 1.25 in, D_ClayPlot, Π_HD, D_CoagPlot) < 0.4
            Dose[i] ← Dose[i] + 0.1*mg/L
    Dose
ϕ_Hyp := ϕ_Floc.0(Dose_Hyp, Inf_Hyp, 1)
θ_Hyp := 430 s
ε_Hyp := 22*mW/kg
Param_ViscHyp := Param_Visc(Γ_Hyp, θ_Hyp, ε_Hyp, ν_H2O(295 K), ϕ_Hyp)
Param_InertHyp := Param_Inert(Γ_Hyp, θ_Hyp, ε_Hyp, D_ClayPlot, ϕ_Hyp)
Model_ViscHyp := Model_Visc(k_Visc, Param_ViscHyp)
Model_InertHyp := Model_Inert(k_Inert, Param_InertHyp)
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K_15 := 2.85
N_B := 349
L_Floc := 56.35 m
D_Floc := 1.25 in
Γ_PP := 0.05
Q_PP := 0.05*L/s, 0.06*L/s .. 0.25*L/s
D_ClayPP := 7 μm
ϕ_PP := 5*10^-4
ν_PP := 1*mm^2/s
D_PAClPP := 90 nm
θ_PP(Q) := π/4*D_Floc^2*L_Floc/Q
ϕ_Floc.0(0.9*mg/L, 900*NTU, 1) = 0.000501787
ε_PP(Q) := 2*K_15*N_B*Q^3/(π*D_Floc^2*L_Floc*(π/4*D_Floc^2)^2)
Γ_CoagN(900*NTU, 0.9*mg/L, 1, 1.25 in, D_ClayPP, Π_HD, 90 nm) = 0.0468453
1.98*mL/s/(1.8*mm/s) = 0.0011 m^2
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Γ_PPϕ := 0.4
Turb_PPϕ :=
    for i ∈ 0 .. 180
        Turb[i] ← (1 + i)*5*NTU
    Turb
D_ClayPP = 7e-6 m
Dose_PPϕ :=
    for i ∈ 0 .. length(Turb_PPϕ) - 1
        j ← 0.01
        while Γ_CoagN(Turb_PPϕ[i], j*mg/L, 1, D_Floc, D_ClayPP, Π_HD, D_PAClPP) < Γ_PPϕ
            j ← j + 0.01
        D[i] ← j*mg/L
    return D
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ϕ_PPϕ := ϕ_Floc.0(Dose_PPϕ, Turb_PPϕ, 1)
θ_PPϕ := 420 s
ε_PPϕ := 22*mW/kg
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Model_Visc(0.077, Param_Visc(Γ_PP, θ_PPϕ, ε_PPϕ, ν_PP, ϕ_PPϕ)) - Model_Inert(0.071, Param_Inert(Γ_PP, θ_PPϕ, ε_PPϕ, D_ClayPP, ϕ_PPϕ))
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# [area: Calculations]
d_P := 4 μm
ρ_P := 2.65*gm/cm^3
Λ_0 := (π*d_P^3/6*ρ_P/mean(stack(Inf_1, Inf_Q)))^(1/3) = 4.06355e-5 m
η_Avg0 := (mean(stack(ν_1, ν_Q))^3/mean(stack(ε_1, ε_Q)))^(1/4) = 7.94541e-5 m
Λ_0/η_Avg0 = 0.511434
