directory_metafile ≡ "C:\Users\whp28\Google Drive\AGUACLARA DRIVE\AguaClara Grads\William Pennock\"
pointstoaverage := 0
NTU := 1.7*mg/L
TurbString := "Effluent Turbidity (NTU)"  # Header Search in .xls
RawString := "Influent Turbidity (NTU)"
pHString := "pH probe (pH)"
PIDString := "Clay Pump ()"
HLString := "Head Loss (cm)"
BalanceString := "Balance (g)"  # For IDs 1-3, no g.
WatTempString := "Water Temperature (C)"
AirTempString := "Air Temperature (C)"
ACTempString := "AC Water Temp (C)"
ACDepthString := "AC Water Depth (cm)"
StateID := 3
DatalogTitles := [
    RawString;
    TurbString;
    pHString;
    PIDString;
    HLString;
    BalanceString;
    WatTempString;
    AirTempString;
    ACTempString;
    ACDepthString
]
AbsColumn := 7
NomTurbColumn := 8
CaptureColumn := 9
NomDoseColumn := 10  # Meta File
StockColumn := 11
θColumn := 12
hlColumn := 13
# [reference: Data Functions.xmcd]
# [reference: Fractalflocmodel.xmcd]
# [reference: FluidsFunctions.xmcd]
# [area: Data Sets]
Set_Q := [12; 13; 14; 15; 16]
Zero := [28]
Set_varε := [23; 32; 33]
Set_pHprob := [17; 18; 19; 29; 30; 31]
Set_1 := [20; 21; 22; 23; 24; 25; 26; 27; 35; 36; 37; 38; 39]
[35]
MetaMatrix := [23; 32; 33]
# [area: Matrices]
TimeAll :=
    for i ∈ 0 .. last(MetaMatrix)
        time2 ← TimeData(MetaMatrix[i])
        time1 ← time2 - time2[0]
        time[i] ← time1
    return time
StartTime :=
    for i ∈ 0 .. last(MetaMatrix)
        time[i] ← TimeData(MetaMatrix[i])[0]
    return time
InfAll :=
    for i ∈ 0 .. last(MetaMatrix)
        dat[i] ← AllData(MetaMatrix[i], DatalogTitles[0])
    return dat
EffAll :=
    for i ∈ 0 .. last(MetaMatrix)
        dat[i] ← AllData(MetaMatrix[i], DatalogTitles[1])
    return dat
pHAll :=
    for i ∈ 0 .. last(MetaMatrix)
        dat[i] ← AllData(MetaMatrix[i], DatalogTitles[2])
    return dat
PIDAll :=
    for i ∈ 0 .. last(MetaMatrix)
        dat[i] ← AllData(MetaMatrix[i], DatalogTitles[3])
    return dat
HeadLossAll :=
    for i ∈ 0 .. last(MetaMatrix)
        dat[i] ← AllData(MetaMatrix[i], DatalogTitles[4])
    return dat
BalanceAll :=
    for i ∈ 0 .. last(MetaMatrix)
        dat[i] ← AllData(MetaMatrix[i], DatalogTitles[5])
    return dat
WatTempAll :=
    for i ∈ 0 .. last(MetaMatrix)
        dat[i] ← AllData(MetaMatrix[i], DatalogTitles[6])
    return dat
AirTempAll :=
    for i ∈ 0 .. last(MetaMatrix)
        dat[i] ← AllData(MetaMatrix[i], DatalogTitles[7])
    return dat
ACTempAll :=
    for i ∈ 0 .. last(MetaMatrix)
        dat[i] ← AllData(MetaMatrix[i], DatalogTitles[8])
    return dat
ACDepthAll :=
    for i ∈ 0 .. last(MetaMatrix)
        dat[i] ← AllData(MetaMatrix[i], DatalogTitles[9])
    return dat
# [area: Dose]
DensityData := [635, 0.998; 3177, 1.01; 9037, 1.02; 11014, 1.056; 71, 0.998; 70600, 1.271; 70900, 1.267]
pH :=
    for i ∈ 0 .. last(MetaMatrix)
        dat[i] ← mean(pHAll[i])
    return dat
DensityCode := DensityData[:, 0]
DensityArray := DensityData[:, 1]*gm/mL
pH
Conc_Stock :=
    for i ∈ 0 .. last(MetaMatrix)
        dat[i] ← getparameterfromMetaFile(MetaMatrix[i], StockColumn, directory_metafile)
    return dat
Concentration := Conc_Stock*mg/L
Density :=
    for i ∈ 0 .. last(MetaMatrix)
        dat[i] ← DensityArray[match(Conc_Stock[i], DensityCode)[0]]
    return dat
BalanceRate :=
    for i ∈ 0 .. last(MetaMatrix)
        dat[i] ← |slope(TimeAll[i], BalanceAll[i])*gm/day|
    return dat
126.73 gm/(100 mL) = 1267.3 kg/m^3
ClayFlow :=
    for i ∈ 0 .. last(MetaMatrix)
        dat[i] ← mean(PIDAll[i])*100*rpm*0.401*mL/rev
    return dat
# . | Assume tubing value.
θ_Exp :=
    for i ∈ 0 .. last(MetaMatrix)
        dat[i] ← getparameterfromMetaFile(MetaMatrix[i], θColumn, directory_metafile)*s
    return dat
# Neglects residence time in SWaT.
TotalFlow := (56.35 m*π/4)*(1.25 in)^2/θ_Exp + BalanceRate/Density + ClayFlow
(56.35 m*π/4)*(1.25 in)^2/(100*mL/s) = 446.14 s
Total
CoagDose := vectorize(BalanceRate/Density*Concentration/TotalFlow)
# [area: Performance]
Eff :=
    for i ∈ 0 .. last(MetaMatrix)
        dat[i] ← mean(EffAll[i])
    return dat
Inf :=
    for i ∈ 0 .. last(MetaMatrix)
        dat[i] ← mean(InfAll[i])
    return dat
pC_star :=
    for i ∈ 0 .. last(MetaMatrix)
        dat[i] ← -log(Eff[i]/Inf[i])
    return dat
# [area: Composite Parameter]
D_Clay ≡ 7 μm
D_PACl ≡ 90 nm
EN_Chem := 1
D_Tube := 1.25 in
Π_AClayATotal(C_Clay, D_Clay, D_Tube, Π_HD) := 1/(1 + 2*D_Clay/(3*D_Tube*Π_ClaySphere(Π_HD)*C_Clay/ρ_Clay))  # disabled
Γ_CoagN(C_Clay, C_Al, EN_Chem, D_Tube, D_Clay, Π_HD, D_PACl) := 1 - exp(-ϕ_Floc.0(C_Al, 0*mg/L, EN_Chem)*D_Clay/(ϕ_Floc.0(0*mg/L, C_Clay, EN_Chem)*D_PACl)*1/π*Π_AClayATotal(C_Clay, D_Clay, D_Tube, Π_HD)/Π_ClaySphere(Π_HD))
HeadLoss :=
    for i ∈ 0 .. last(MetaMatrix)
        dat[i] ← getparameterfromMetaFile(MetaMatrix[i], hlColumn, directory_metafile)*cm
    return dat
HeadLoss_Floc :=
    for i ∈ 0 .. last(MetaMatrix)
        dat[i] ← mean(HeadLossAll[i])*cm
    return dat
ε_Avg := HeadLoss_Floc*g/θ_Exp
ν_Exp :=
    for i ∈ 0 .. last(MetaMatrix)
        dat[i] ← ν_H2O(mean(WatTempAll[i] °C))
    return dat
Γ_Exp :=
    for i ∈ 0 .. last(MetaMatrix)
        dat[i] ← Γ_CoagN(mean(InfAll[i])*NTU, CoagDose[i], EN_Chem, D_Tube, D_Clay, Π_HD, D_PACl)
    return dat
ϕ_Exp :=
    for i ∈ 0 .. last(MetaMatrix)
        dat[i] ← ϕ_Floc.0(mean(CoagDose[i]), mean(InfAll[i]*NTU), EN_Chem)
    return dat
Param_Visc := vectorize(Γ_Exp*θ_Exp*(ε_Avg/ν_Exp)^(1/2)*ϕ_Exp^(2/3))
Param_Inert := vectorize(Γ_Exp*θ_Exp*(ε_Avg/D_Clay^2)^(1/3)*ϕ_Exp^(8/9))
# [area: Miscellaneous]
AirTemp :=
    for i ∈ 0 .. last(MetaMatrix)
        dat[i] ← mean(AirTempAll[i] °C)
    return dat
WatTemp :=
    for i ∈ 0 .. last(MetaMatrix)
        dat[i] ← mean(WatTempAll[i] °C)
    return dat
ACTemp :=
    for i ∈ 0 .. last(MetaMatrix)
        dat[i] ← mean(ACTempAll[i] °C)
    return dat
ACDepth :=
    for i ∈ 0 .. last(MetaMatrix)
        dat[i] ← mean(ACDepthAll[i]*cm)
    return dat
V_Cap :=
    for i ∈ 0 .. last(MetaMatrix)
        dat[i] ← getparameterfromMetaFile(MetaMatrix[i], CaptureColumn, directory_metafile)*mm/s
    return dat
    = [0.12; 0.12; 0.12] mm/s
PID :=
    for i ∈ 0 .. last(MetaMatrix)
        dat[i] ← mean(PIDAll[i])
    return dat
# [area: Individual Graphs]
No := 0
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1000 s = 16.6667 min
30 min = 1800 s
1200 s = 20 min
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1800 s = 30 min
25 min + 750 s = 37.5 min
40 min = 2400 s
2400 s = 40 min
2400 s + 1200 s = 60 min
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(GetTime(MetaMatrix[0], directory_metafile, 0) - GetTime(MetaMatrix[0], directory_metafile, 0)[0]) =  # error: Encountered a file I/O error.
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12 min = 720 s
mean(EffAll[0]) =  # error: This variable is undefined.
stdev(EffAll[0]) =  # error
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# [area: Write Data Out]
Write := 0
Location := "C:\Users\whp28\Google Drive\AGUACLARA DRIVE\AguaClara Grads\William Pennock\Spring 2017\Data\Aggregated Data\"
Name := "VarEDR.txt"
writetofile(data, location, name, write) :=
    filepath ← concat(location, name)
    APPENDPRN(filepath, data) if write == 1
    break otherwise
DataCols := [
    MetaMatrix[:, 0];
    pH;
    HeadLoss_Floc/cm;
    AirTemp/K;
    WatTemp/K;
    ACTemp/K;
    ACDepth/cm;
    Eff;
    Inf;
    pC_star;
    CoagDose/(mg/L);
    V_Cap/(mm/s);
    θ_Exp/s;
    TotalFlow/(mL/s);
    HeadLoss/cm;
    ε_Avg/(mW/kg);
    ν_Exp/(mm^2/s);
    Γ_Exp;
    ϕ_Exp;
    Param_Visc;
    Param_Inert
]
DataCols
DataMat :=
    M ← DataCols[0]
    for i ∈ 1 .. length(DataCols) - 1
        M ← augment(M, DataCols[i])
    M
Agg := writetofile(DataMat, Location, Name, Write)
