# Tutorial of Coagulant and Clay System Design for Coiled Flocculator
# http://www.ismatec.com/int_e/tubing/3-stop/3_stoptubing.htm
# http://www.ismatec.com/int_e/pumps/t_mini_s_ms_ca/tubing_msca2.htm
# Below is data from the ismatec table.
# [reference: Fractalflocmodel.xmcd]
# tubing code  ID (mm)  ml/rev
# Variable | : is the variable should be defined
# Design | : is the design that can be used to run your experiment
Result
# : is the result that is helpful for you to have a better understanding of your experiment
Comment
# : is the comment that indicates the constraint for this design
Comment
# : is the comment that indicates the variable which you can play with to achieve the constraint
0.02
0.401
0.151
R_Pump := 1.62 cm  # This pump rotor radius was set based on minimizing the error between predicted and measured values. This is for the 6 roller pump heads.
480*mL/min/(600 rpm) = 0.127324 mL
TubingData := [
    "orange-black", 0.13, 0.001383333;
    "orange-red", 0.19, 0.002833333;
    "orange-blue", 0.25, 0.004833333;
    "orange-green", 0.38, 0.010833333;
    "green-yellow", 0.44, 0.014333333;
    "orange-yellow", 0.51, 0.02;
    "white-yellow", 0.57, 0.023333333;
    "orange-white", 0.64, 0.03;
    "black-black", 0.76, 0.041666667;
    "orange-orange", 0.89, 0.056666667;
    "white-black", 0.95, 0.063333333;
    "white-white", 1.02, 0.073333333;
    "white-red", 1.09, 0.083333333;
    "red-red", 1.14, 0.09;
    "red-grey", 1.22, 0.101666667;
    "grey-grey", 1.3, 0.115;
    "yellow-yellow", 1.42, 0.133333333;
    "yellow-blue", 1.52, 0.151666667;
    "blue-blue", 1.65, 0.166666667;
    "blue-green", 1.75, 0.183333333;
    "green-green", 1.85, 0.216666667;
    "purple-purple", 2.06, 0.25;
    "purple-black", 2.29, 0.283333333;
    "purple-orange", 2.54, 0.333333333;
    "purple-orange", 2.62, 0.366666667;
    "purple-white", 2.79, 0.401;
    "black-white", 3.17, 0.433333333;
    "16", 3.1, 0.127
]
# This corrects for the fact that larger diameter tubing has more loss due to the space smashed by the rollers. I'm actually not quite sure what this mechanism is...This was set based on minimizing the error between predicted and measured values.
TubingData[:, 2][5] = 0.02
k_Nonlinear := 13
TubingData[:, 2][17] = 0.151667
TubingData[:, 2][25] = 0.401
# The vectorization is needed if an array is passed to this function
# The function below returns the flow per revolution given the ID of the 3-stop tubing. This function returns values that are very close to the table produced by ismatec.
TubingData[:, 2][25]/TubingData[:, 2][17] = 2.64396
Q6roller_TubePerRevCalc(ID_Tube) := vectorize(((R_Pump*π*2 - k_Nonlinear*ID_Tube)/rev)*ID_Tube^2/4*π)
TubingData[:, 2][25]/TubingData[:, 2][5] = 20.05
# In the lab we currently have orange-yellow, yellow-blue, and purple-white tubing
Tube_Code := TubingData[:, 0]
70 rpm*0.401*mL/rev = 0.467833 mL/s
ID_TubeArray := TubingData[:, 1]*mm
Q_TubePerRev := TubingData[:, 2]*mL/rev
10/310 = 3.22581 %
0.5/100.5 = 0.497512 %
# Determining Q.floc:
Q_Plant := 100*mL/s  # (Estimate)
# Mixing
ID_TubeArray = [0.13; 0.19; 0.25; 0.38; 0.44; 0.51; 0.57; 0.64; 0.76; 0.89; 0.95; 1.02; 1.09; 1.14; 1.22; 1.3; 1.42; 1.52; 1.65; 1.75; 1.85; 2.06; 2.29; 2.54; 2.62; 2.79; 3.17; 3.1] mm
# Clay
NTU = 1.7 mgm/L
C_Clay := 1000*NTU  # Turbidity (NTU) of the expected influent
# The concentration of clay in the mixed water in the flocculator.
MinRPM := 3*rev/min
# This is for a 100 rpm pump and is designed to get the pump operating at an rpm where it has good speed control and it has the ability to be adjusted up or down as needed. Some of our pumps have a minimum speed of about 2.3 rpm.
MaxRPM := 95*rev/min
ClayTubingColors := "purple-white"
ID_ClayTubing := ID_TubeArray[match(ClayTubingColors, Tube_Code)[0]] = 2.79 mm
9 min*Q6roller_TubePerRevCalc(ID_ClayTubing)*MaxRPM = 342.47 mL
C_ClayStockMax := C_Clay*Q_Plant/(Q6roller_TubePerRevCalc(ID_ClayTubing)*MinRPM) = 8488.34 gm/L
Q6roller_TubePerRevCalc(ID_ClayTubing)*MaxRPM = 0.634204 mL/s
C_ClayStockMin := C_Clay*Q_Plant/(Q6roller_TubePerRevCalc(ID_ClayTubing)*MaxRPM) = 268.053 gm/L
# Clay stock concentrations of up to 300 g/L have been tested and are able to be pumped.
Floor(C_ClayStockMax/(10^(floor(log(C_ClayStockMax/(gm/L))) - 1)*(gm/L)), 1)*10^(floor(log(C_ClayStockMax/(gm/L))) - 1)*gm/L = 8400 gm/L
# The concentration of clay in the stock bottle. You can change this to make sure the designed velocity for the clay pump is within the range of velocity of the pump.
C_ClayStock := 300*gm/L
V_ClayStock := 4 L  # The volume of container which holds clay suspension.
M_stockclay := C_ClayStock*V_ClayStock = 1200 gm  # The mass of clay that we need to add into the stock container
Q_ClayStock := C_Clay*Q_Plant/C_ClayStock = 0.566667 mL/s
# Flow rate of clay suspension that needed
T_ClayStock := V_ClayStock/Q_ClayStock = 1.96078 hr  # The time at which the clay  suspension in the container would run out.
# HCl
meq := 50 mg
# PACl
Γ_CoagN(C_Clay, C_Al, EN_Chem, D_Tube, D_Clay, Π_HD, D_PACl) := 1 - exp(-ϕ_Floc.0(C_Al, 0*mg/L, EN_Chem)*D_Clay/(ϕ_Floc.0(0*mg/L, C_Clay, EN_Chem)*D_PACl)*1/π*Π_AClayATotal(C_Clay, D_Clay, D_Tube, Π_HD)/Π_ClaySphere(Π_HD))
C_SuperStockPACl := 70.6*gm/L  # Concentration of Aluminum in the laboratory PACl stock (Confirm that this matches the stock concentration you are using.)
D_Clay ≡ 7 μm
D_Coag ≡ 20 nm
C_PAClMin :=
    C_PACl. ← 0.001*mg/L
    while Γ_CoagN(900*NTU, C_PACl, 1, 1.25 in, D_Clay, 0.1, D_Coag) < 0.05
        C_PACl ← C_PACl + 0.001*mg/L
    C_PAClMin ← C_PACl
# Minimum of 1% coverage
# The minimum dose of PACl of the mixed water in the flocculator.
C_PAClMin = 0.244 mgm/L
C_PAClMax :=
    C_PACl. ← 0.001*mg/L
    while Γ_CoagN(900*NTU, C_PACl, 1, 1.25 in, D_Clay, 0.1, D_Coag) < 0.99
        C_PACl ← C_PACl + 0.001*mg/L
    C_PAClMin ← C_PACl
# Maximum of 99% coverage
C_PAClMax = 21.828 mgm/L  # The maximum dose of PACl of the mixed water in the flocculator.
Base := (C_PAClMax/C_PAClMin)^(1/7) = 1.90022
Doses :=
    for i ∈ 0 .. 7
        D[i] ← C_PAClMin*Base^i
    D
Doses = [0.244; 0.463653; 0.881042; 1.67417; 3.18129; 6.04515; 11.4871; 21.828] mgm/L
Γ_Range := Γ_CoagN(900*NTU, Doses, 1, 1.25 in, D_Clay, 0.1, D_Coag) = [0.0501766; 0.0931894; 0.169629; 0.297575; 0.4889; 0.720683; 0.911394; 0.990001]
HighDosesi :=
    i ← 8
    while Γ_CoagN(900*NTU, C_PAClMin*Base^i, 1, 1.25 in, 2 μm, 0.1, 100 nm) < 0.85
        i ← i + 1
    i
    = 10
HighDoses :=
    for i ∈ 0 .. 2
        D[i] ← C_PAClMin*Base^(i + 8)
    D
    = [41.478; 78.8172; 149.77] mgm/L
Γ_High := Γ_CoagN(900*NTU, HighDoses, 1, 1.25 in, 2 μm, 0.1, 100 nm) = [0.418083; 0.642575; 0.858436]
PAClTubingColors := "yellow-blue"
mLrev_Coag := 0.127*mL/rev
1/7*L/(13.7 rpm*mLrev_Coag) = 4926.39 s
ID_PAClTubing := ID_TubeArray[match(PAClTubingColors, Tube_Code)[0]] = 1.52 mm
C_PAClStockMax := C_PAClMin*Q_Plant/(mLrev_Coag*MinRPM) = 3.84252 gm/L
log(C_PAClStockMax/(gm/L)) = 0.584616
C_PAClStockMin := C_PAClMax*Q_Plant/(mLrev_Coag*MaxRPM) = 10.8552 gm/L
floor(log(C_PAClStockMax/(gm/L))) - 1 = -1
# This term figures out which digit to round to.
C_PAClStock := Floor(C_PAClStockMax/(10^(floor(log(C_PAClStockMax/(gm/L))) - 1)*(gm/L)), 1)*10^(floor(log(C_PAClStockMax/(gm/L))) - 1)*gm/L = 3.8 gm/L
10^(floor(log(C_PAClStockMax/(gm/L))) - 1) = 0.1
V_PAClBottle := 1 L  # The volume of container which holds coagulant.
# The volume of the PACl super stock that must be diluted to the volume of the PAClBottle.
500.2 gm/(0.5 L) = 1.0004 gm/mL
V_PAClSuperStock := V_PAClBottle*0.6*(gm/L)/C_SuperStockPACl = 8.49858 mL
1.142*gm/mL*0.5*L = 571 gm
C_Round := 45 mL/(1 L)*C_SuperStockPACl = 3.177 gm/L
# Flow rate of coagulant solution that is needed
RPMlow := C_PAClMin*Q_Plant/(mLrev_Coag*9*gm/L) = 1.28084 rpm
Q_PAClMax := C_PAClMax*Q_Plant/C_Round = 0.687063 mL/s
-log(5/900) = 2.25527
# The time after which the coagulant in the container  would be run out.
C_Min := (10 rpm*mLrev_Coag*70.9*gm/L)/Q_Plant = 15.0072 mgm/L
t_PACl := V_PAClBottle/Q_PAClMax = 24.2578 min
Γ_CoagN(900*NTU, C_Max, 1, 1.25 in, D_Clay, 0.1, D_Coag) =  # error: This variable is undefined.
Conc := 0.9*mg/L*Q_Plant/(mLrev_Coag*95*rpm) = 447.576 mgm/L
# Strong Base
# PACl
eqv := 1
conc_PAClOrig := 70.6*gm/L
normality_PACl := 1*eqv/L*17.7*mL/(10 mL) = 1.77 eqv/L
normality_NaOHOrig := 1*eqv/L
eqv_PACl := normality_PACl/conc_PAClOrig = 0.0250708 eqv/gm
conc_PACl := 70.9*gm/L
eqv_PAClDose := conc_PACl*eqv_PACl = 1.77752 eqv/L
V_Stock := 1 L
MW_NaOH := 40*gm/eqv
m_NaOH := MW_NaOH*V_Stock*eqv_PAClDose = 71.1008 gm
# Water
TAlk := 2.8*10^-3*eqv/L
pH := 7.67
C_TAvg := (TAlk + 10^(-pH)*eqv/L - 10^(pH - 14)*eqv/L)/(2*(1/((10^(-pH))^2/(10^-6.3*10^-10.3) + 10^(-pH)/10^-10.3 + 1)) + 1/(10^(-pH)/10^-6.3 + 1 + 10^-10.3/10^(-pH))) = 0.00291189 eqv/L
C_T := 2.91*10^-3*eqv/L
pH_N := 7.1
ANC_N := (2*(1/((10^(-pH_N))^2/(10^-6.3*10^-10.3) + 10^(-pH_N)/10^-10.3 + 1)) + 1/(10^(-pH_N)/10^-6.3 + 1 + 10^-10.3/10^(-pH_N)))*C_T + 10^(pH_N - 14)*eqv/L - 10^(-pH_N)*eqv/L = 0.00251374 1/L
pH_T := 7.5
ANC_T := (2*(1/((10^(-pH_T))^2/(10^-6.3*10^-10.3) + 10^(-pH_T)/10^-10.3 + 1)) + 1/(10^(-pH_T)/10^-6.3 + 1 + 10^-10.3/10^(-pH_T)))*C_T + 10^(pH_T - 14)*eqv/L - 10^(-pH_T)*eqv/L = 0.00274216 eqv/L
Base_W := ANC_T - ANC_N = 0.000228423 eqv/L
RPM_Target := 15 rpm
mLrev_Base := 0.21*mL/rev
N_BaseStock := Base_W*Q_Plant/(RPM_Target*mLrev_Base) = 0.435092 eqv/L
m_NaOH.W := MW_NaOH*V_Stock*N_BaseStock = 17.4037 gm
N_SuperStock := 1*eqv/L
V_SuperStock := N_BaseStock*V_Stock/N_SuperStock = 435.092 mL
N_BaseActual := 80 mL*N_SuperStock/V_Stock = 0.08 eqv/L  # Based on running at 15 rpm to bring water from pH of 7.4 to 7.5.
RPM_Extra := Base_W*Q_Plant/(N_BaseActual*mLrev_Base) = 81.5797 rpm
# Recycle
Tubing_18 := 3.8*mL/rev
L_Recycle := 116 in
A_Recycle := π/4*(0.17 in)^2 = 1.46438e-5 m^2  # Approximate, since Clearflex tubing of unkown size (close) is uesd in addition to 1/4" OD tubing.
T_RecycleMin := L_Recycle*A_Recycle/(600 rpm*Tubing_18) = 1.13544 s
T_RecycleMax := L_Recycle*A_Recycle/(3 rpm*Tubing_18) = 227.088 s
T_RecycleActual := L_Recycle*A_Recycle/(450 rpm*Tubing_18) = 1.51392 s
# Water
Q_water := Q_Plant - Q_ClayStock - Q_PAClMax = 98.7463 mL/s
# Flow rate of water needed directly from the tap. This can be calculated in ProCoDA using the external function for subtract.
# RPM calculation
